# OpenSim document version 20302
Model AR_forearm_30:
  credits: Menegolo Andrea
  length_units: meters
  force_units: N
  gravity: 0 -9.80665 0
  publications:
    Delp, S.L., Loan, J.P., Hoy, M.G., Zajac, F.E., Topp E.L., Rosen, J.M.: An interactive graphics-based model of the lower extremity to study orthopaedic surgical procedures, IEEE Transactions on Biomedical Engineering, vol. 37, pp. 757-767, 1990.
    Yamaguchi G.T., Zajac F.E.: A planar model of the knee joint to characterize the knee extensor mechanism." J . Biomecl7. vol. 21. pp. 1-10. 1989.
    Anderson F.C., Pandy M.G.: A dynamic optimization solution for vertical jumping in three dimensions. Computer Methods in Biomechanics and Biomedical Engineering 2:201-231, 1999.
    Anderson F.C., Pandy M.G.: Dynamic optimization of human walking. Journal of Biomechanical Engineering 123:381-390, 2001.
    Delp SL, Anderson FC, Arnold AS, Loan P, Habib A, John CT, Guendelman E, Thelen DG (in press). OpenSim: Open-source Software to Create and Analyze Dynamic Simulations of Movement. IEEE Transactions on Biomedical Engineering. (2007)
    Holzbaur KR, Murray WM, Delp SL.: A model of the upper extremity for simulating musculoskeletal surgery and analyzing neuromuscular control., Ann Biomed Eng. 2005 Jun;33(6):829-40. (2005)
    NOTE: This model has been developed on the base of the 3DGaitModel2354.osim model (developed by Delp S.L. et all) and the Stanford VA Upper Limb Model.osim model
    (developed by Holzbaur KR et all). Not additional informations are present in this model that cannot be found in the original ones.
    This model has been built by the author aiming only to provide a starting model for a full body model.
  BodySet:
    Body ground: mass=0 mass_center=(0 0 0) inertia_xx=0 inertia_yy=0 inertia_zz=0 meshes=treadmill.vtp
    Body humerus_l: mass=0 mass_center=(0 0 0) inertia_xx=0 inertia_yy=0 inertia_zz=0 meshes=humerus_l.vtp
      CustomJoint ground_humerus: parent_body=ground location_in_parent=(0 0 0) location=(0 0 0)
        Coordinate humerus_tilt: motion_type=rotational default_value=-0.05019625 initial_value=-0.05019625
            range=(-1.570796 1.570796) clamped=true
        Coordinate humerus_list: motion_type=rotational default_value=-3.141593 initial_value=-3.141593
            range=(-3.141593 3.141593) clamped=true locked=true
        Coordinate humerus_rotation: motion_type=rotational default_value=-0.8915316 initial_value=-0.8915316
            range=(-1.570796 1.570796) clamped=true
        Coordinate humerus_tx: motion_type=translational default_value=0.00640422 initial_value=0.00640422 range=(-5 5)
            clamped=true
        Coordinate humerus_ty: motion_type=translational default_value=0.6013817 initial_value=0.6013817 range=(-1 2)
            clamped=true
        Coordinate humerus_tz: motion_type=translational default_value=0.02147435 initial_value=0.02147435 range=(-3 3)
            clamped=true
        SpatialTransform:
          TransformAxis rotation1: coordinates=humerus_tilt axis=(1 0 0) LinearFunction(coefficients=1 0)
          TransformAxis rotation2: coordinates=humerus_list axis=(0 1 0) LinearFunction(coefficients=1 0)
          TransformAxis rotation3: coordinates=humerus_rotation axis=(0 0 1) LinearFunction(coefficients=1 0)
          TransformAxis translation1: coordinates=humerus_tx axis=(1 0 0) LinearFunction(coefficients=1 0)
          TransformAxis translation2: coordinates=humerus_ty axis=(0 1 0) LinearFunction(coefficients=1 0)
          TransformAxis translation3: coordinates=humerus_tz axis=(0 0 1) LinearFunction(coefficients=1 0)
    Body ulna_l: mass=0 mass_center=(0 0 0) inertia_xx=0 inertia_yy=0 inertia_zz=0 meshes=ulna_l.vtp
      CustomJoint elbow_l: parent_body=humerus_l location_in_parent=(0.004331 -0.206184 0.008733) location=(0 0 0)
        Coordinate elbow_flexion_l: motion_type=rotational default_value=1.308997 initial_value=1.308997
            range=(0 2.268928) clamped=true locked=true
        SpatialTransform: axes_held_at_zero=(rotation2 rotation3 translation1 translation2 translation3)
          TransformAxis rotation1: coordinates=elbow_flexion_l axis=(-0.04940001 -0.03660001 0.9981083)
              LinearFunction(coefficients=1 0)
    Body radius_l: mass=0 mass_center=(0 0 0) inertia_xx=0 inertia_yy=0 inertia_zz=0 meshes=radius_l.vtp
      CustomJoint radioulnar_l: parent_body=ulna_l location_in_parent=(0.00020164 -0.00579866 -0.0100815)
          location=(0 0 0)
        Coordinate wr_sup_pro_l: motion_type=rotational default_value=1.570796 initial_value=1.570796
            range=(-1.570796 1.570796) clamped=true
        SpatialTransform: axes_held_at_zero=(rotation2 rotation3 translation1 translation2 translation3)
          TransformAxis rotation1: coordinates=wr_sup_pro_l axis=(0.01716099 -0.9926656 -0.119668)
              LinearFunction(coefficients=1 0)
    Body lunate_l: mass=0 mass_center=(0 0 0) inertia_xx=0 inertia_yy=0 inertia_zz=0 meshes=lunate_l.vtp
      CustomJoint radiocarpal_l: parent_body=radius_l location_in_parent=(0.0090738 -0.1219922 -0.0126025)
          location=(0 0 0)
        Coordinate wr_adduction_l: motion_type=rotational default_value=-0.00000118 initial_value=-0.00000118
            range=(-0.1745329 0.4363323) clamped=true
        Coordinate wr_flexion_l: motion_type=rotational default_value=-0.00000375 initial_value=-0.00000375
            range=(-1.570796 1.570796) clamped=true
        SpatialTransform: axes_held_at_zero=(rotation3 translation1 translation2 translation3)
          TransformAxis rotation1: coordinates=wr_adduction_l axis=(0.819064 0.135611 -0.557444)
            NaturalCubicSpline: x=(-0.1745329 0 0.4363323) y=(-0.1745329 0 0.4363323)
          TransformAxis rotation2: coordinates=wr_flexion_l axis=(-0.9564267 0.2522069 0.147104)
            NaturalCubicSpline: x=(-1.570796 1.570796) y=(-0.7853982 0.7853982)
    Body scaphoid_l: mass=0 mass_center=(0 0 0) inertia_xx=0 inertia_yy=0 inertia_zz=0 meshes=scaphoid_l.vtp
      WeldJoint lun_scaph_l: parent_body=lunate_l location_in_parent=(0.00736389 -0.00266281 0.00074801)
          location=(0 0 0)
    Body pisiform_l: mass=0 mass_center=(0 0 0) inertia_xx=0 inertia_yy=0 inertia_zz=0 meshes=pisiform_l.vtp
      WeldJoint lun_pis_l: parent_body=lunate_l location_in_parent=(-0.00798604 -0.00589706 0.00631879)
          location=(0 0 0)
    Body triquetrum_l: mass=0 mass_center=(0 0 0) inertia_xx=0 inertia_yy=0 inertia_zz=0 meshes=triquetrum_l.vtp
      WeldJoint lun_triq_l: parent_body=lunate_l location_in_parent=(-0.00643273 -0.0044732 0.00076889)
          location=(0 0 0)
    Body capitate_l: mass=0 mass_center=(0 0 0) inertia_xx=0 inertia_yy=0 inertia_zz=0 meshes=capitate_l.vtp
      CustomJoint proximal_distal_l: parent_body=lunate_l location_in_parent=(0.00238127 -0.00897981 -0.00138806)
          location=(0 0 0)
        Coordinate proximal_distal_r1_l: motion_type=rotational default_value=-0.136394 initial_value=-0.136394
            range=(-99999.9 99999.9) clamped=true
        Coordinate proximal_distal_r3_l: motion_type=rotational default_value=0.4834586 initial_value=0.4834586
            range=(-99999.9 99999.9) clamped=true
        SpatialTransform: axes_held_at_zero=(rotation3 translation1 translation2 translation3)
          TransformAxis rotation1: coordinates=proximal_distal_r1_l axis=(-0.8991357 0.3490529 -0.2640399)
              LinearFunction(coefficients=1 0)
          TransformAxis rotation2: coordinates=proximal_distal_r3_l axis=(-0.9971185 -0.01069999 -0.07510096)
              LinearFunction(coefficients=1 0)
    Body trapezium_l: mass=0 mass_center=(0 0 0) inertia_xx=0 inertia_yy=0 inertia_zz=0 meshes=trapezium_l.vtp
      WeldJoint cap_trpzm_l: parent_body=capitate_l location_in_parent=(0.00912238 -0.00272544 0.00614879)
          location=(0 0 0)
    Body trapezoid_l: mass=0 mass_center=(0 0 0) inertia_xx=0 inertia_yy=0 inertia_zz=0 meshes=trapezoid_l.vtp
      WeldJoint cap_trpzd_l: parent_body=capitate_l location_in_parent=(0.00545386 -0.002423 0.0014698)
          location=(0 0 0)
    Body hamate_l: mass=0 mass_center=(0 0 0) inertia_xx=0 inertia_yy=0 inertia_zz=0 meshes=hamate_l.vtp
      WeldJoint cap_ham_l: parent_body=capitate_l location_in_parent=(-0.00654308 -0.00148827 0.00044738)
          location=(0 0 0)
    Body firstmc1_l: mass=0 mass_center=(0 0 0) inertia_xx=0 inertia_yy=0 inertia_zz=0
      CustomJoint 1CMCa_l: parent_body=trapezium_l location_in_parent=(0 0 0) location=(0 0 0)
        Coordinate 1CMC_flex_l: motion_type=rotational default_value=0.00000069 initial_value=0.00000069
            range=(-0.7853982 0.7853982) clamped=true
        SpatialTransform: axes_held_at_zero=(rotation2 rotation3 translation1 translation2 translation3)
          TransformAxis rotation1: coordinates=1CMC_flex_l axis=(-0.04239899 -0.6652858 -0.7453838)
              LinearFunction(coefficients=1 0)
    Body firstmc_l: mass=0 mass_center=(0 0 0) inertia_xx=0 inertia_yy=0 inertia_zz=0 meshes=1mc_l.vtp
      CustomJoint 1CMCb_l: parent_body=firstmc1_l location_in_parent=(0.00398121 -0.00298591 0.00138236)
          location=(0 0 0)
        Coordinate 1CMC_abd_l: motion_type=rotational default_value=0 initial_value=0 range=(-0.872664 0.872664)
            clamped=true
        SpatialTransform: axes_held_at_zero=(rotation2 rotation3 translation1 translation2 translation3)
          TransformAxis rotation1: coordinates=1CMC_abd_l axis=(-0.495557 -0.731736 0.467959)
              LinearFunction(coefficients=1 0)
    Body secondmc_l: mass=0 mass_center=(0 0 0) inertia_xx=0 inertia_yy=0 inertia_zz=0 meshes=2mc_l.vtp
      WeldJoint 2CMC: parent_body=trapezoid_l location_in_parent=(0.00130585 -0.0015176 -0.00247143)
          location=(-0.002 0.0185 0.002)
    Body thirdmc_l: mass=0 mass_center=(0 0 0) inertia_xx=0 inertia_yy=0 inertia_zz=0 meshes=3mc_l.vtp
      WeldJoint 3CMC: parent_body=capitate_l location_in_parent=(-0.00021545 -0.00490634 -0.00090043)
          location=(-0.0005 0.0185 0.0035)
    Body fourthmc_l: mass=0 mass_center=(0 0 0) inertia_xx=0 inertia_yy=0 inertia_zz=0 meshes=4mc_l.vtp
      CustomJoint 4CMC: parent_body=hamate_l location_in_parent=(0.00035756 -0.0031816 -0.00004291)
          location=(0.001 0.0195 0.0025)
        Coordinate 4CMC_ext: motion_type=rotational default_value=0 initial_value=0 range=(0 0.1745329) clamped=true
        SpatialTransform: axes_held_at_zero=(translation1 translation2 translation3)
          TransformAxis rotation1: coordinates=4CMC_ext axis=(1 0 0) LinearFunction(coefficients=1 0)
          TransformAxis rotation2: axis=(0 1 0) Function=LinearFunction(coefficients=1 0)
          TransformAxis rotation3: axis=(0 0 1) Function=LinearFunction(coefficients=1 0)
    Body fifthmc_l: mass=0 mass_center=(0 0 0) inertia_xx=0 inertia_yy=0 inertia_zz=0 meshes=5mc_l.vtp
      CustomJoint 5CMC: parent_body=hamate_l location_in_parent=(-0.00251805 -0.00270039 0.00106869)
          location=(0.004 0.0165 -0.001)
        Coordinate 5CMC_ext: motion_type=rotational default_value=0 initial_value=0 range=(0 0.2617994) clamped=true
        Coordinate 5CMC_abd: motion_type=rotational default_value=0 initial_value=0 range=(-0.08726646 0) clamped=true
        SpatialTransform: axes_held_at_zero=(translation1 translation2 translation3)
          TransformAxis rotation1: coordinates=5CMC_ext axis=(1 0 0) LinearFunction(coefficients=1 0)
          TransformAxis rotation2: coordinates=5CMC_abd axis=(0 0 1) LinearFunction(coefficients=1 0)
          TransformAxis rotation3: axis=(0 1 0) Function=LinearFunction(coefficients=1 0)
    Body proximal_thumb_l: mass=0 mass_center=(0 0 0) inertia_xx=0 inertia_yy=0 inertia_zz=0 meshes=thumbprox_l.vtp
      CustomJoint MCP_l: parent_body=firstmc_l location_in_parent=(0.00912362 -0.01614605 0.00702242) location=(0 0 0)
        Coordinate 1mcp_flexion_l: motion_type=rotational default_value=0 initial_value=0 range=(-0.3490659 1.0472)
            clamped=true
        Coordinate 1mcp_abduction_l: motion_type=rotational default_value=0 initial_value=0
            range=(-0.2617994 0.2617994) clamped=true
        SpatialTransform: axes_held_at_zero=(rotation3 translation1 translation2 translation3)
          TransformAxis rotation1: coordinates=1mcp_flexion_l axis=(-0.084295 -0.203488 -0.975442)
              LinearFunction(coefficients=1 0)
          TransformAxis rotation2: coordinates=1mcp_abduction_l axis=(0.05499898 0.9947846 -0.08589897)
              LinearFunction(coefficients=1 0)
    Body distal_thumb_l: mass=0 mass_center=(0 0 0) inertia_xx=0 inertia_yy=0 inertia_zz=0 meshes=thumbdist_l.vtp
      CustomJoint IP_l: parent_body=proximal_thumb_l location_in_parent=(0.00567811 -0.01050452 0.00409635)
          location=(0 0 0)
        Coordinate 1ip_flexion_l: motion_type=rotational default_value=0 initial_value=0 range=(-1.308997 0.4363323)
            clamped=true locked=true
        SpatialTransform: axes_held_at_zero=(rotation2 rotation3 translation1 translation2 translation3)
          TransformAxis rotation1: coordinates=1ip_flexion_l axis=(0.05010201 0.4796231 0.8760431)
              LinearFunction(coefficients=1 0)
    Body 2proxph_l: mass=0 mass_center=(0 0 0) inertia_xx=0 inertia_yy=0 inertia_zz=0 meshes=2proxph_l.vtp
      CustomJoint 2MCP_l: parent_body=secondmc_l location_in_parent=(0.00236186 -0.01905346 -0.00244214)
          location=(0 0 0)
        Coordinate 2mcp_flexion_l: motion_type=rotational default_value=0.00000096 initial_value=0.00000096
            range=(-0.7 1.570796) clamped=true
        Coordinate 2mcp_abduction_l: motion_type=rotational default_value=0 initial_value=0 range=(-0.0873 0.2617994)
            clamped=true
        SpatialTransform: axes_held_at_zero=(rotation3 translation1 translation2 translation3)
          TransformAxis rotation1: coordinates=2mcp_flexion_l axis=(-0.9975061 0.03949601 0.05849401)
              LinearFunction(coefficients=1 0)
          TransformAxis rotation2: coordinates=2mcp_abduction_l axis=(0.05499898 -0.08589897 0.9947846)
              LinearFunction(coefficients=1 0)
    Body 2midph_l: mass=0 mass_center=(0 0 0) inertia_xx=0 inertia_yy=0 inertia_zz=0 meshes=2midph_l.vtp
      CustomJoint 2prox-midph_l: parent_body=2proxph_l location_in_parent=(0.00537595 -0.02951727 -0.00523934)
          location=(0 0 0)
        Coordinate 2pm_flexion_l: motion_type=rotational default_value=0 initial_value=0 range=(0 2.094395)
            clamped=true
        SpatialTransform: axes_held_at_zero=(rotation2 rotation3 translation1 translation2 translation3)
          TransformAxis rotation1: coordinates=2pm_flexion_l axis=(-0.9603449 -0.040998 -0.275784)
              LinearFunction(coefficients=1 0)
    Body 2distph_l: mass=0 mass_center=(0 0 0) inertia_xx=0 inertia_yy=0 inertia_zz=0 meshes=2distph_l.vtp
      CustomJoint 2mid-distph_l: parent_body=2midph_l location_in_parent=(0.00158828 -0.01185997 -0.00058137)
          location=(0 0 0)
        Coordinate 2md_flexion_l: motion_type=rotational default_value=0 initial_value=0 range=(0 1.570796)
            clamped=true locked=true
        SpatialTransform: axes_held_at_zero=(rotation2 rotation3 translation1 translation2 translation3)
          TransformAxis rotation1: coordinates=2md_flexion_l axis=(-0.9789773 -0.07690602 -0.1889151)
              LinearFunction(coefficients=1 0)
    Body 3proxph_l: mass=0 mass_center=(0 0 0) inertia_xx=0 inertia_yy=0 inertia_zz=0 meshes=3proxph_l.vtp
      CustomJoint 3MCP_l: parent_body=thirdmc_l location_in_parent=(0.00016191 -0.01773591 -0.00119948)
          location=(0 0 0)
        Coordinate 3mcp_flexion_l: motion_type=rotational default_value=0 initial_value=0 range=(-0.7 1.570796)
            clamped=true
        Coordinate 3mcp_abduction_l: motion_type=rotational default_value=0 initial_value=0 range=(-0.0873 0.0873)
            clamped=true
        SpatialTransform: axes_held_at_zero=(rotation3 translation1 translation2 translation3)
          TransformAxis rotation1: coordinates=3mcp_flexion_l axis=(-0.9975061 0.03949601 0.05849401)
              LinearFunction(coefficients=1 0)
          TransformAxis rotation2: coordinates=3mcp_abduction_l axis=(0.05499898 -0.08589897 0.9947846)
              LinearFunction(coefficients=1 0)
    Body 3midph_l: mass=0 mass_center=(0 0 0) inertia_xx=0 inertia_yy=0 inertia_zz=0 meshes=3midph_l.vtp
      CustomJoint 3prox-midph_l: parent_body=3proxph_l location_in_parent=(0.00132956 -0.03562527 -0.00502014)
          location=(0 0 0)
        Coordinate 3pm_flexion_l: motion_type=rotational default_value=0 initial_value=0 range=(0 2.094395)
            clamped=true
        SpatialTransform: axes_held_at_zero=(rotation2 rotation3 translation1 translation2 translation3)
          TransformAxis rotation1: coordinates=3pm_flexion_l axis=(-0.9603449 -0.040998 -0.275784)
              LinearFunction(coefficients=1 0)
    Body 3distph_l: mass=0 mass_center=(0 0 0) inertia_xx=0 inertia_yy=0 inertia_zz=0 meshes=3distph_l.vtp
      CustomJoint 3mid-distph_l: parent_body=3midph_l location_in_parent=(0.00095081 -0.02023327 -0.0013611)
          location=(0 0 0)
        Coordinate 3md_flexion_l: motion_type=rotational default_value=0 initial_value=0 range=(0 1.570796)
            clamped=true locked=true
        SpatialTransform: axes_held_at_zero=(rotation2 rotation3 translation1 translation2 translation3)
          TransformAxis rotation1: coordinates=3md_flexion_l axis=(-0.9789773 -0.07690602 -0.1889151)
              LinearFunction(coefficients=1 0)
    Body 4proxph_l: mass=0 mass_center=(0 0 0) inertia_xx=0 inertia_yy=0 inertia_zz=0 meshes=4proxph_l.vtp
      CustomJoint 4MCP_l: parent_body=fourthmc_l location_in_parent=(0.0001693 -0.01854578 -0.00125425)
          location=(0 0 0)
        Coordinate 4mcp_flexion_l: motion_type=rotational default_value=-0.00000001 initial_value=-0.00000001
            range=(-0.7 1.570796) clamped=true
        Coordinate 4mcp_adduction_l: motion_type=rotational default_value=0 initial_value=0 range=(-0.0873 0.0873)
            clamped=true
        SpatialTransform: axes_held_at_zero=(rotation3 translation1 translation2 translation3)
          TransformAxis rotation1: coordinates=4mcp_flexion_l axis=(-0.9975061 0.03949601 0.05849401)
              LinearFunction(coefficients=1 0)
          TransformAxis rotation2: coordinates=4mcp_adduction_l axis=(0.05499898 -0.08589897 0.9947846)
              LinearFunction(coefficients=1 0)
    Body 4midph_l: mass=0 mass_center=(0 0 0) inertia_xx=0 inertia_yy=0 inertia_zz=0 meshes=4midph_l.vtp
      CustomJoint 4prox-midph_l: parent_body=4proxph_l location_in_parent=(-0.0027171 -0.03100246 -0.00103586)
          location=(0 0 0)
        Coordinate 4pm_flexion_l: motion_type=rotational default_value=0 initial_value=0 range=(0 2.094395)
            clamped=true
        SpatialTransform: axes_held_at_zero=(rotation2 rotation3 translation1 translation2 translation3)
          TransformAxis rotation1: coordinates=4pm_flexion_l axis=(-0.9603449 -0.040998 -0.275784)
              LinearFunction(coefficients=1 0)
    Body 4distph_l: mass=0 mass_center=(0 0 0) inertia_xx=0 inertia_yy=0 inertia_zz=0 meshes=4distph_l.vtp
      CustomJoint 4mid-distph_l: parent_body=4midph_l location_in_parent=(-0.00204038 -0.02182952 -0.00049578)
          location=(0 0 0)
        Coordinate 4md_flexion_l: motion_type=rotational default_value=0 initial_value=0 range=(0 1.570796)
            clamped=true locked=true
        SpatialTransform: axes_held_at_zero=(rotation2 rotation3 translation1 translation2 translation3)
          TransformAxis rotation1: coordinates=4md_flexion_l axis=(-0.9789773 -0.07690602 -0.1889151)
              LinearFunction(coefficients=1 0)
    Body 5proxph_l: mass=0 mass_center=(0 0 0) inertia_xx=0 inertia_yy=0 inertia_zz=0 meshes=5proxph_l.vtp
      CustomJoint 5MCP_l: parent_body=fifthmc_l location_in_parent=(-0.00112657 -0.0151181 0.00105532) location=(0 0 0)
        Coordinate 5mcp_flexion_l: motion_type=rotational default_value=0 initial_value=0 range=(-0.7 2.094395)
            clamped=true
        Coordinate 5mcp_adduction_l: motion_type=rotational default_value=0 initial_value=0 range=(-0.2618 0.0873)
            clamped=true
        SpatialTransform: axes_held_at_zero=(rotation3 translation1 translation2 translation3)
          TransformAxis rotation1: coordinates=5mcp_flexion_l axis=(-0.9975061 0.03949601 0.05849401)
              LinearFunction(coefficients=1 0)
          TransformAxis rotation2: coordinates=5mcp_adduction_l axis=(0.05499898 -0.08589897 0.9947846)
              LinearFunction(coefficients=1 0)
    Body 5midph_l: mass=0 mass_center=(0 0 0) inertia_xx=0 inertia_yy=0 inertia_zz=0 meshes=5midph_l.vtp
      CustomJoint 5prox-midph_l: parent_body=5proxph_l location_in_parent=(-0.00410252 -0.02763735 0.00223739)
          location=(0 0 0)
        Coordinate 5pm_flexion_l: motion_type=rotational default_value=0 initial_value=0 range=(0 2.094395)
            clamped=true
        SpatialTransform: axes_held_at_zero=(rotation2 rotation3 translation1 translation2 translation3)
          TransformAxis rotation1: coordinates=5pm_flexion_l axis=(-0.9603449 -0.040998 -0.275784)
              LinearFunction(coefficients=1 0)
    Body 5distph_l: mass=0 mass_center=(0 0 0) inertia_xx=0 inertia_yy=0 inertia_zz=0 meshes=5distph_l.vtp
      CustomJoint 5mid-distph_l: parent_body=5midph_l location_in_parent=(-0.00250254 -0.01802333 0.00195513)
          location=(0 0 0)
        Coordinate 5md_flexion_l: motion_type=rotational default_value=0 initial_value=0 range=(0 1.570796)
            clamped=true locked=true
        SpatialTransform: axes_held_at_zero=(rotation2 rotation3 translation1 translation2 translation3)
          TransformAxis rotation1: coordinates=5md_flexion_l axis=(-0.9789773 -0.07690602 -0.1889151)
              LinearFunction(coefficients=1 0)
    Body bicpt_l: mass=0 mass_center=(0 0 0) inertia_xx=0 inertia_yy=0 inertia_zz=0
      CustomJoint bicpt_l: parent_body=radius_l location_in_parent=(0 0 0) location=(0 0 0)
        Coordinate bicpt_tx_l: motion_type=translational default_value=0.00169035 initial_value=0.00169035
            range=(-99999.9 99999.9) clamped=true
        Coordinate bicpt_ty_l: motion_type=translational default_value=-0.02569927 initial_value=-0.02569927
            range=(-99999.9 99999.9) clamped=true
        Coordinate bicpt_tz_l: motion_type=translational default_value=-0.00403608 initial_value=-0.00403608
            range=(-99999.9 99999.9) clamped=true
        SpatialTransform: axes_held_at_zero=(rotation1 rotation2 rotation3)
          TransformAxis translation1: coordinates=bicpt_tx_l axis=(1 0 0) LinearFunction(coefficients=1 0)
          TransformAxis translation2: coordinates=bicpt_ty_l axis=(0 1 0) LinearFunction(coefficients=1 0)
          TransformAxis translation3: coordinates=bicpt_tz_l axis=(0 0 -1) LinearFunction(coefficients=1 0)
    Body bicpt2_l: mass=0 mass_center=(0 0 0) inertia_xx=0 inertia_yy=0 inertia_zz=0
      CustomJoint bicpt2_l: parent_body=radius_l location_in_parent=(0 0 0) location=(0 0 0)
        Coordinate bicpt2_tx_l: motion_type=translational default_value=0.01041294 initial_value=0.01041294
            range=(-99999.9 99999.9) clamped=true
        Coordinate bicpt2_ty_l: motion_type=translational default_value=-0.0217076 initial_value=-0.0217076
            range=(-99999.9 99999.9) clamped=true
        Coordinate bicpt2_tz_l: motion_type=translational default_value=-0.00128124 initial_value=-0.00128124
            range=(-99999.9 99999.9) clamped=true
        SpatialTransform: axes_held_at_zero=(rotation1 rotation2 rotation3)
          TransformAxis translation1: coordinates=bicpt2_tx_l axis=(1 0 0) LinearFunction(coefficients=1 0)
          TransformAxis translation2: coordinates=bicpt2_ty_l axis=(0 1 0) LinearFunction(coefficients=1 0)
          TransformAxis translation3: coordinates=bicpt2_tz_l axis=(0 0 -1) LinearFunction(coefficients=1 0)
    Body ptpt_l: mass=0 mass_center=(0 0 0) inertia_xx=0 inertia_yy=0 inertia_zz=0
      CustomJoint ptpt_l: parent_body=ulna_l location_in_parent=(0 0 0) location=(0 0 0)
        Coordinate ptpt_tx_l: motion_type=translational default_value=0.00107604 initial_value=0.00107604
            range=(-99999.9 99999.9) clamped=true
        Coordinate ptpt_ty_l: motion_type=translational default_value=-0.0488494 initial_value=-0.0488494
            range=(-99999.9 99999.9) clamped=true
        Coordinate ptpt_tz_l: motion_type=translational default_value=-0.00470653 initial_value=-0.00470653
            range=(-99999.9 99999.9) clamped=true
        SpatialTransform: axes_held_at_zero=(rotation1 rotation2 rotation3)
          TransformAxis translation1: coordinates=ptpt_tx_l axis=(1 0 0) LinearFunction(coefficients=1 0)
          TransformAxis translation2: coordinates=ptpt_ty_l axis=(0 1 0) LinearFunction(coefficients=1 0)
          TransformAxis translation3: coordinates=ptpt_tz_l axis=(0 0 -1) LinearFunction(coefficients=1 0)
    Body FCUpt_l: mass=0 mass_center=(0 0 0) inertia_xx=0 inertia_yy=0 inertia_zz=0
      CustomJoint FCUpt_l: parent_body=radius_l location_in_parent=(0 0 0) location=(0 0 0)
        Coordinate FCUpt_tx_l: motion_type=translational default_value=0.00869283 initial_value=0.00869283
            range=(-99999.9 99999.9) clamped=true
        Coordinate FCUpt_ty_l: motion_type=translational default_value=-0.129491 initial_value=-0.129491
            range=(-99999.9 99999.9) clamped=true
        Coordinate FCUpt_tz_l: motion_type=translational default_value=-0.00002018 initial_value=-0.00002018
            range=(-99999.9 99999.9) clamped=true
        SpatialTransform: axes_held_at_zero=(rotation1 rotation2 rotation3)
          TransformAxis translation1: coordinates=FCUpt_tx_l axis=(1 0 0) LinearFunction(coefficients=1 0)
          TransformAxis translation2: coordinates=FCUpt_ty_l axis=(0 1 0) LinearFunction(coefficients=1 0)
          TransformAxis translation3: coordinates=FCUpt_tz_l axis=(0 0 -1) LinearFunction(coefficients=1 0)
    Body EDCpt_l: mass=0 mass_center=(0 0 0) inertia_xx=0 inertia_yy=0 inertia_zz=0
      CustomJoint EDCpt_l: parent_body=radius_l location_in_parent=(0 0 0) location=(0 0 0)
        Coordinate EDCpt_tx_l: motion_type=translational default_value=-0.00695822 initial_value=-0.00695822
            range=(-99999.9 99999.9) clamped=true
        Coordinate EDCpt_ty_l: motion_type=translational default_value=0.00237372 initial_value=0.00237372
            range=(-99999.9 99999.9) clamped=true
        Coordinate EDCpt_tz_l: motion_type=translational default_value=-0.00044251 initial_value=-0.00044251
            range=(-99999.9 99999.9) clamped=true
        SpatialTransform: axes_held_at_zero=(rotation1 rotation2 rotation3)
          TransformAxis translation1: coordinates=EDCpt_tx_l axis=(1 0 0) LinearFunction(coefficients=1 0)
          TransformAxis translation2: coordinates=EDCpt_ty_l axis=(0 1 0) LinearFunction(coefficients=1 0)
          TransformAxis translation3: coordinates=EDCpt_tz_l axis=(0 0 -1) LinearFunction(coefficients=1 0)
    Body APLpt_l: mass=0 mass_center=(0 0 0) inertia_xx=0 inertia_yy=0 inertia_zz=0
      CustomJoint APLpt_l: parent_body=capitate_l location_in_parent=(0 0 0) location=(0 0 0)
        Coordinate APLpt_tx_l: motion_type=translational default_value=-0.00105715 initial_value=-0.00105715
            range=(-99999.9 99999.9) clamped=true
        Coordinate APLpt_ty_l: motion_type=translational default_value=-0.00042286 initial_value=-0.00042286
            range=(-99999.9 99999.9) clamped=true
        Coordinate APLpt_tz_l: motion_type=translational default_value=-0.00211431 initial_value=-0.00211431
            range=(-99999.9 99999.9) clamped=true
        SpatialTransform: axes_held_at_zero=(rotation1 rotation2 rotation3)
          TransformAxis translation1: coordinates=APLpt_tx_l axis=(1 0 0) LinearFunction(coefficients=1 0)
          TransformAxis translation2: coordinates=APLpt_ty_l axis=(0 1 0) LinearFunction(coefficients=1 0)
          TransformAxis translation3: coordinates=APLpt_tz_l axis=(0 0 -1) LinearFunction(coefficients=1 0)
    Body FPLpt_l: mass=0 mass_center=(0 0 0) inertia_xx=0 inertia_yy=0 inertia_zz=0
      CustomJoint FPLpt_l: parent_body=capitate_l location_in_parent=(0 0 0) location=(0 0 0)
        Coordinate FPLpt_tx_l: motion_type=translational default_value=-0.00135316 initial_value=-0.00135316
            range=(-99999.9 99999.9) clamped=true
        Coordinate FPLpt_ty_l: motion_type=translational default_value=-0.00405947 initial_value=-0.00405947
            range=(-99999.9 99999.9) clamped=true
        Coordinate FPLpt_tz_l: motion_type=translational default_value=-0.00228345 initial_value=-0.00228345
            range=(-99999.9 99999.9) clamped=true
        SpatialTransform: axes_held_at_zero=(rotation1 rotation2 rotation3)
          TransformAxis translation1: coordinates=FPLpt_tx_l axis=(1 0 0) LinearFunction(coefficients=1 0)
          TransformAxis translation2: coordinates=FPLpt_ty_l axis=(0 1 0) LinearFunction(coefficients=1 0)
          TransformAxis translation3: coordinates=FPLpt_tz_l axis=(0 0 -1) LinearFunction(coefficients=1 0)
    Body FPLpt2_l: mass=0 mass_center=(0 0 0) inertia_xx=0 inertia_yy=0 inertia_zz=0
      CustomJoint FPLpt2_l: parent_body=capitate_l location_in_parent=(0 0 0) location=(0 0 0)
        Coordinate FPLpt2_tx_l: motion_type=translational default_value=-0.00022439 initial_value=-0.00022439
            range=(-99999.9 99999.9) clamped=true
        Coordinate FPLpt2_ty_l: motion_type=translational default_value=0.00008473 initial_value=0.00008473
            range=(-99999.9 99999.9) clamped=true
        Coordinate FPLpt2_tz_l: motion_type=translational default_value=0.00010169 initial_value=0.00010169
            range=(-99999.9 99999.9) clamped=true
        SpatialTransform: axes_held_at_zero=(rotation1 rotation2 rotation3)
          TransformAxis translation1: coordinates=FPLpt2_tx_l axis=(1 0 0) LinearFunction(coefficients=1 0)
          TransformAxis translation2: coordinates=FPLpt2_ty_l axis=(0 1 0) LinearFunction(coefficients=1 0)
          TransformAxis translation3: coordinates=FPLpt2_tz_l axis=(0 0 -1) LinearFunction(coefficients=1 0)
  ConstraintSet:
    CoordinateCouplerConstraint proximal_distal_r1_con_l: independent_coordinate_names=wr_adduction_l
        dependent_coordinate_name=proximal_distal_r1_l scale_factor=1
      coupled_coordinates_function: NaturalCubicSpline f18_l: x=(-0.1745329 0 0.4363323) y=(-0.2617994 0 0.4363323)
    CoordinateCouplerConstraint proximal_distal_r3_con_l: independent_coordinate_names=wr_flexion_l
        dependent_coordinate_name=proximal_distal_r3_l scale_factor=1
      coupled_coordinates_function: NaturalCubicSpline f19_l: x=(-1.22173 1.22173) y=(-0.6108652 0.6108652)
    CoordinateCouplerConstraint bicpt_tx_con_l: independent_coordinate_names=elbow_flexion_l
        dependent_coordinate_name=bicpt_tx_l scale_factor=0.5041
      coupled_coordinates_function: NaturalCubicSpline f70_l: x=(0 2.268928) y=(-0.0001 0.0042)
    CoordinateCouplerConstraint bicpt_ty_con_l: independent_coordinate_names=elbow_flexion_l
        dependent_coordinate_name=bicpt_ty_l scale_factor=0.5041
      coupled_coordinates_function: NaturalCubicSpline f71_l: x=(0 2.268928) y=(-0.0276 -0.0425)
    CoordinateCouplerConstraint bicpt_tz_con_l: independent_coordinate_names=elbow_flexion_l
        dependent_coordinate_name=bicpt_tz_l scale_factor=0.5041
      coupled_coordinates_function: NaturalCubicSpline f72_l: x=(0 2.268928) y=(-0.0043 -0.0067)
    CoordinateCouplerConstraint bicpt2_tx_con_l: independent_coordinate_names=wr_sup_pro_l
        dependent_coordinate_name=bicpt2_tx_l scale_factor=0.5041
      coupled_coordinates_function: NaturalCubicSpline f80_l: x=(-1.570796 -0.6108652 1.578228) y=(-0.003 0.01 0.01376)
    CoordinateCouplerConstraint bicpt2_ty_con_l: independent_coordinate_names=elbow_flexion_l
        dependent_coordinate_name=bicpt2_ty_l scale_factor=0.5041
      coupled_coordinates_function: NaturalCubicSpline f81_l: x=(0 2.274834) y=(-0.0102 -0.045607)
    CoordinateCouplerConstraint bicpt2_tz_con_l: independent_coordinate_names=wr_sup_pro_l
        dependent_coordinate_name=bicpt2_tz_l scale_factor=0.5041
      coupled_coordinates_function: NaturalCubicSpline f82_l: x=(-1.570796 -0.6108652 1.575614)
          y=(-0.0095 -0.011533 -0.000331)
    CoordinateCouplerConstraint ptpt_tx_con_l: independent_coordinate_names=wr_sup_pro_l
        dependent_coordinate_name=ptpt_tx_l scale_factor=0.5041
      coupled_coordinates_function: NaturalCubicSpline f90_l: x=(-1.570796 1.570796) y=(0.0142 0.0009)
    CoordinateCouplerConstraint ptpt_ty_con_l: independent_coordinate_names=wr_sup_pro_l
        dependent_coordinate_name=ptpt_ty_l scale_factor=0.5041
      coupled_coordinates_function: NaturalCubicSpline f91_l: x=(-1.570796 1.570796) y=(-0.0606 -0.0692)
    CoordinateCouplerConstraint ptpt_tz_con_l: independent_coordinate_names=wr_sup_pro_l
        dependent_coordinate_name=ptpt_tz_l scale_factor=0.5041
      coupled_coordinates_function: NaturalCubicSpline f92_l: x=(-1.570796 1.570796) y=(0.0072 -0.0073)
    CoordinateCouplerConstraint FCUpt_tx_con_l: independent_coordinate_names=wr_sup_pro_l
        dependent_coordinate_name=FCUpt_tx_l scale_factor=0.5041
      coupled_coordinates_function: NaturalCubicSpline f100_l: x=(-1.570796 0 1.570796) y=(-0.0027 0.004 0.0132)
    CoordinateCouplerConstraint FCUpt_ty_con_l: independent_coordinate_names=wr_sup_pro_l
        dependent_coordinate_name=FCUpt_ty_l scale_factor=0.5041
      coupled_coordinates_function: NaturalCubicSpline f101_l: x=(-1.570796 0 1.570796) y=(-0.1838 -0.1841 -0.1821)
    CoordinateCouplerConstraint FCUpt_tz_con_l: independent_coordinate_names=wr_sup_pro_l
        dependent_coordinate_name=FCUpt_tz_l scale_factor=0.5041
      coupled_coordinates_function: NaturalCubicSpline f102_l: x=(-1.570796 0 1.570796) y=(0.0069 0.0005 0.0002)
    CoordinateCouplerConstraint EDCpt_tx_con_l: independent_coordinate_names=wr_sup_pro_l
        dependent_coordinate_name=EDCpt_tx_l scale_factor=0.5041
      coupled_coordinates_function: NaturalCubicSpline f110_l: x=(-1.570796 0 1.570796) y=(0.0108 0 -0.0108)
    CoordinateCouplerConstraint EDCpt_ty_con_l: independent_coordinate_names=wr_sup_pro_l
        dependent_coordinate_name=EDCpt_ty_l scale_factor=0.5041
      coupled_coordinates_function: NaturalCubicSpline f111_l: x=(-1.570796 0 1.570796) y=(-0.0013 0 0.0038)
    CoordinateCouplerConstraint EDCpt_tz_con_l: independent_coordinate_names=wr_sup_pro_l
        dependent_coordinate_name=EDCpt_tz_l scale_factor=0.5041
      coupled_coordinates_function: NaturalCubicSpline f112_l: x=(-1.570796 0 1.570796) y=(-0.0035 0 -0.00089)
    CoordinateCouplerConstraint APLpt_tx_con_l: independent_coordinate_names=wr_flexion_l
        dependent_coordinate_name=APLpt_tx_l scale_factor=0.5965071
      coupled_coordinates_function: NaturalCubicSpline f120_l: x=(-1.22173 0 1.22173) y=(0 0 -0.0025)
    CoordinateCouplerConstraint APLpt_ty_con_l: independent_coordinate_names=wr_flexion_l
        dependent_coordinate_name=APLpt_ty_l scale_factor=0.5965071
      coupled_coordinates_function: NaturalCubicSpline f121_l: x=(-1.22173 0 1.22173) y=(0 0 -0.001)
    CoordinateCouplerConstraint APLpt_tz_con_l: independent_coordinate_names=wr_flexion_l
        dependent_coordinate_name=APLpt_tz_l scale_factor=0.5965071
      coupled_coordinates_function: NaturalCubicSpline f122_l: x=(-1.22173 0 1.22173) y=(0 0 -0.005)
    CoordinateCouplerConstraint FPLpt_tx_con_l: independent_coordinate_names=wr_flexion_l
        dependent_coordinate_name=FPLpt_tx_l scale_factor=0.5965071
      coupled_coordinates_function: NaturalCubicSpline f130_l: x=(-1.22173 0 1.22173) y=(0 0 -0.0032)
    CoordinateCouplerConstraint FPLpt_ty_con_l: independent_coordinate_names=wr_flexion_l
        dependent_coordinate_name=FPLpt_ty_l scale_factor=0.5965071
      coupled_coordinates_function: NaturalCubicSpline f131_l: x=(-1.22173 0 1.22173) y=(0 0 -0.0096)
    CoordinateCouplerConstraint FPLpt_tz_con_l: independent_coordinate_names=wr_flexion_l
        dependent_coordinate_name=FPLpt_tz_l scale_factor=0.5965071
      coupled_coordinates_function: NaturalCubicSpline f132_l: x=(-1.22173 0 1.22173) y=(0 0 -0.0054)
    CoordinateCouplerConstraint FPLpt2_tx_con_l: independent_coordinate_names=1CMC_flex_l
        dependent_coordinate_name=FPLpt2_tx_l scale_factor=0.5965071
      coupled_coordinates_function: NaturalCubicSpline f140_l: x=(-0.2617994 0 0.08726646 0.1836751 0.3764925 0.7853032)
          y=(-0.0032 0 0.00004 0.000032 0.000008 0)
    CoordinateCouplerConstraint FPLpt2_ty_con_l: independent_coordinate_names=1CMC_flex_l
        dependent_coordinate_name=FPLpt2_ty_l scale_factor=0.5965071
      coupled_coordinates_function: NaturalCubicSpline f141_l: x=(-0.2617994 0 0.7853982) y=(0.0005 0 0)
    CoordinateCouplerConstraint FPLpt2_tz_con_l: independent_coordinate_names=1CMC_flex_l
        dependent_coordinate_name=FPLpt2_tz_l scale_factor=0.5965071
      coupled_coordinates_function: NaturalCubicSpline f142_l: x=(-0.2617994 0 0.7853982) y=(0.0006 0 0)
  MarkerSet:
    Marker D1P: firstmc_l (0.00766207 -0.00711161 0.00348256)
    Marker D1M: firstmc_l (0.01142803 -0.0164996 0.00704017)
    Marker D1D: proximal_thumb_l (0.00818762 -0.0123627 0.00495411)
    Marker D2P: secondmc_l (0.00279069 -0.02005845 -0.00739953)
    Marker D2M: 2proxph_l (0.00524676 -0.02890786 -0.00977767)
    Marker D2D: 2midph_l (0.00165278 -0.01134913 -0.00409936)
    Marker D3P: thirdmc_l (0.0012888 -0.01883397 -0.00656548)
    Marker D3M: 3proxph_l (0.00096621 -0.0365344 -0.00717369)
    Marker D3D: 3midph_l (0.00003097 -0.01986184 -0.00373817)
    Marker D4P: fourthmc_l (-0.00197997 -0.01959327 -0.0058929)
    Marker D4M: 4proxph_l (-0.00353329 -0.03382565 -0.00218123)
    Marker D4D: 4midph_l (-0.0012341 -0.02129123 -0.00411568)
    Marker D5P: 5proxph_l (-0.00157159 -0.00119313 -0.00554076)
    Marker D5M: 5proxph_l (-0.00556491 -0.03075847 0.00113952)
    Marker D5D: 5midph_l (-0.00252753 -0.02048516 -0.00131851)
    Marker HDC: thirdmc_l (-0.00088864 -0.00028776 -0.00321998)
    Marker HPL: hamate_l (-0.00253763 -0.0008865 -0.00421517)
    Marker HPM: trapezoid_l (0.00388455 0.0022997 -0.00227323)
    Marker WDL: ulna_l (0.00208179 -0.1141262 -0.02696522)
    Marker WDM: radius_l (0.01716362 -0.1017495 -0.01670729)
    Marker WPC: radius_l (0.00522243 -0.08959189 -0.01453368)
